// SBML level 2 version 1

model untitled()

  // Compartments:
  compartment compartment = 1;

  // Species:
  species X in compartment = 9.584635;
  species E in compartment = 2.117781;
  species C in compartment = 2.522542;
  species $A in compartment = 0.04824653;
  species $B in compartment = 0.4254804;

  // Parameters:
  Flux1_k_1 = 0.0008453504;
  Flux1_k1 = 0.7265299;
  Flux2f_k2 = 0.01891593;
  Flux2r_k_2 = 0.04430253;
  Flux3f_k3 = 0.1168408;
  Flux3r_k_3 = 0.07779318;

  // Reactions:
  Flux1: X + $A => 2 X; A*X*Flux1_k1 - X*X*Flux1_k_1;
  Flux2f: E + X => C; X*E*Flux2f_k2;
  Flux2r: C => E + X; C*Flux2r_k_2;
  Flux3f: C => $B + E; C*Flux3f_k3;
  Flux3r: E + $B => C; B*E*Flux3r_k_3;
end
