// SBML level 1 version 1

model untitled()

  // Compartments:
  compartment compartment = 1;

  // Species:
  species MKKK in compartment = 174.0416/compartment;
  species MKKK_P in compartment = 7.29778/compartment;
  species MKK in compartment = 213.8288/compartment;
  species MKK_P in compartment = 6.302954/compartment;
  species MKK_PP in compartment = 4.76071/compartment;
  species MAPK in compartment = 180.7984/compartment;
  species MAPK_P in compartment = 1.922638/compartment;
  species MAPK_PP in compartment = 6.450214/compartment;

  // Parameters:
  J0_K1 = 9.821183;
  J0_n = 0.5767351;
  J0_Ki = 3.045196;
  J0_V1 = 0.7924094;
  J1_KK2 = 1.382996;
  J1_V2 = 0.1025811;
  J2_KK3 = 11.99356;
  J2_k3 = 0.002762364;
  J3_KK4 = 24.40637;
  J3_k4 = 0.01383368;
  J4_KK5 = 19.64274;
  J4_V5 = 1.617845;
  J5_KK6 = 27.51666;
  J5_V6 = 0.1444142;
  J6_KK7 = 29.02647;
  J6_k7 = 0.01172463;
  J7_KK8 = 18.24008;
  J7_k8 = 0.007106342;
  J8_KK9 = 2.241101;
  J8_V9 = 0.06595628;
  J9_KK10 = 15.14313;
  J9_V10 = 0.08169919;

  // Reactions:
  J0: MKKK => MKKK_P; J0_V1*MKKK/((1+(MAPK_PP/J0_Ki)^J0_n)*(J0_K1+MKKK));
  J1: MKKK_P => MKKK; J1_V2*MKKK_P/(J1_KK2+MKKK_P);
  J2: MKK => MKK_P; J2_k3*MKKK_P*MKK/(J2_KK3+MKK);
  J3: MKK_P => MKK_PP; J3_k4*MKKK_P*MKK_P/(J3_KK4+MKK_P);
  J4: MKK_PP => MKK_P; J4_V5*MKK_PP/(J4_KK5+MKK_PP);
  J5: MKK_P => MKK; J5_V6*MKK_P/(J5_KK6+MKK_P);
  J6: MAPK => MAPK_P; J6_k7*MKK_PP*MAPK/(J6_KK7+MAPK);
  J7: MAPK_P => MAPK_PP; J7_k8*MKK_PP*MAPK_P/(J7_KK8+MAPK_P);
  J8: MAPK_PP => MAPK_P; J8_V9*MAPK_PP/(J8_KK9+MAPK_PP);
  J9: MAPK_P => MAPK; J9_V10*MAPK_P/(J9_KK10+MAPK_P);
end
