// SBML level 2 version 1

model untitled()

  // Compartments:
  compartment compartment = 1;

  // Species:
  species X in compartment = 3.868705;
  species Y in compartment = 0.3738779;
  species $A in compartment = 0.9392852;
  species $B in compartment = 0.4267806;
  species $D in compartment = 1.355639e-16;
  species $E in compartment = 1.353125e-23;

  // Parameters:
  J0_k_1 = 0.6952978;
  J1_k_2 = 0.2767773;
  J2_k_3 = 2.490296;
  J3_k_4 = 0.4117782;

  // Reactions:
  J0: $A => X; J0_k_1*A;
  J1: 2 X + Y => 3 X; J1_k_2*X*X*Y;
  J2: X + $B => Y + $D; J2_k_3*X*B;
  J3: X => $E; J3_k_4*X;
end
