// SBML level 1 version 1

model untitled()

  // Compartments:
  compartment compartment = 1;

  // Species:
  species A in compartment = 4.890074/compartment;
  species X in compartment = 1.557045/compartment;
  species Y in compartment = 0.9010362/compartment;
  species Z in compartment = 0.0003441594/compartment;
  species $P in compartment = 3.613541/compartment;
  species $B in compartment = 2.686654e-25/compartment;

  // Parameters:
  J0_k2 = 0.0154759;
  J0_k1 = 0.04103119;
  J1_k2 = 0.02910273;
  J1_k1 = 0.4998518;
  J2_k2 = 1.146245;
  J2_k1 = 3.211975;
  J3_k2 = 0.7081485;
  J3_k1 = 0.9506189;

  // Reactions:
  J0: $P => A; J0_k1*P-J0_k2*A;
  J1: A + X => 2 X; J1_k1*A*X-J1_k2*X*X;
  J2: X + Y => Z; J2_k1*X*Y-J2_k2*Z;
  J3: Z => $B + Y; J3_k1*Z-J3_k2*B*Y;
end
