// SBML level 2 version 1

model untitled()

  // Compartments:
  compartment compartment = 1;

  // Species:
  species R in compartment = 0.6454006;
  species E in compartment = 1.994949;
  species EP in compartment = 0.1355181;
  species $source in compartment = 1.391667e-11;
  species $waste in compartment = 0.000389648;

  // Parameters:
  _J1_S = 1.130879;
  _J1_k1 = 0.00892067;
  _J1_ko = 2.589722e-21;
  _J2_k2p = 0.1317357;
  _J2_k2 = 0.2827009;
  _J3_Km1 = 0.009413768;
  _J3_k3 = 0.3184015;
  _J4_Km2 = 4.843085;
  _J4_k4 = 0.03555676;

  // Reactions:
  _J1: $source => R; _J1_ko + _J1_k1*_J1_S;
  _J2: R => $waste; _J2_k2*R + _J2_k2p*E*R;
  _J3: E => EP; _J3_k3*R*E/(_J3_Km1 + E);
  _J4: EP => E; _J4_k4*EP/(_J4_Km2 + EP);
end
