// SBML level 3 version 1
// dcterms:bibliographicCitation: http://identifiers.org/doi/10.1103/PhysRevE.72.031908

function Constant_flux__irreversible(v)
  v;
end
Constant_flux__irreversible is "Constant flux (irreversible)";

function transcription_and_translation(k, X)
  k*X;
end

model MODEL1408130000()
  // François2005 - Mixed Feedback Loop (two-gene network)
  // biomodels.db:MODEL1408130000
  // biomodels.db:BIOMD0000000539
  // isDescribedBy pubmed:16241483
  // isVersionOf GO:0010468
  // hasTaxon taxonomy:131567
  // model units - substance: substance, time: time, volume: volume, area: area, length: length, extent: substance

  // Compartments:
  compartment cell = 1 litre;

  // Species:
  species A in cell = 5.438589;  // substance in mole; CHEBI:36080
  species AgB in cell = 6.791012e-12;  // substance in mole; SO:0000704
  species gB in cell = 0.5327001;  // substance in mole; SO:0000704
  species rB in cell = 1.170852e-12;  // substance in mole; CHEBI:33699
  species B in cell = 7.402021e-21;  // substance in mole; CHEBI:36080
  species AB in cell = 5.248148e-24;  // substance in mole; GO:0043234

  // Parameters:
  theta = 0.3094896;
  alpha = 0.2459185;
  rhob = 7.544651;
  rhof = 0.09762509;
  deltar = 0.006665462;
  rhoA = 164.6576;
  gamma = 2.476659;
  deltaA = 0.002240625;
  deltaB = 0.00721367;
  beta = 0.4202499;
  deltaAB = 0.006478448;

  // Reactions:
  A_binds_gB: A + gB => AgB; cell*alpha*A*gB;  // isVersionOf GO:0008134
  gB_releases_A: AgB => A + gB; cell*theta*AgB;
  basal_transcription_B: => rB; cell*transcription_and_translation(rhof, gB);  // modifiers: gB; isVersionOf GO:0009299
  stim_transcription_B: => rB; cell*transcription_and_translation(rhob, AgB);  // modifiers: AgB; isVersionOf GO:0009299
  degradation_mRNA_B: rB => ; cell*deltar*rB;  // isVersionOf GO:0006402
  production_A: => A; cell*Constant_flux__irreversible(rhoA);  // isVersionOf GO:0006412
  degradation_A: A => ; cell*deltaA*A;  // isVersionOf GO:0030163
  translation_B: => B; cell*transcription_and_translation(beta, rB);  // modifiers: rB; isVersionOf GO:0006412
  degradation_B: B => ; cell*deltaB*B;  // isVersionOf GO:0030163
  formation_dimer: A + B => AB; cell*gamma*A*B;  // isVersionOf GO:0006461
  degradation_dimer: AB => ; cell*deltaAB*AB;  // isVersionOf GO:0030163

  // Unit definitions:
  unit length = metre;
  unit area = metre^2;
  unit volume = 1e-12 litre;
  unit time = 60 second;
  unit substance = item;
end
