// SBML level 2 version 3

model Lavrentovich2008_Ca_Oscillations()
  // The model reproduces the time profile of cytoplasmic Calcium as depicted in Fig 3 of the paper. Model successfully reproduced using Jarnac and MathSBML.
  // To the extent possible under law, all copyright and related or neighbouring rights to this encoded model have been dedicated to the public domain worldwide. Please refer to CC0 Public Domain Dedication for more information.
  // In summary, you are entitled to use this encoded model in absolutely any manner you deem suitable, verbatim, or with modification, alone or embedded it in a larger context, redistribute it, commercially or not, in a restricted way or not.
  // To cite BioModels Database, please use: Li C, Donizelli M, Rodriguez N, Dharuri H, Endler L, Chelliah V, Li L, He E, Henry A, Stefan MI, Snoep JL, Hucka M, Le Novère N, Laibe C (2010) BioModels Database: An enhanced, curated and annotated resource for published quantitative kinetic models. BMC Syst Biol., 4:92.
  // biomodels.db:MODEL9223106020
  // biomodels.db:BIOMD0000000184
  // isDescribedBy pubmed:18275973
  // hasPart GO:0019722
  // hasTaxon taxonomy:40674

  // Compartments:
  compartment compartment = 1; compartment is "Cytoplasm";  // GO:0005737
  compartment ER = 1; ER is "Endoplasmic Reticulum";  // GO:0005783

  // Species:
  species X in compartment = 6.020396; X is "Cytoplasmic Calcium";  // CHEBI:29108 kegg.compound:C00076
  species Y in ER = 0.1738846; Y is "Calcium in ER";  // CHEBI:29108 kegg.compound:C00076
  species Z in compartment = 0.02918622; Z is "IP3";  // CHEBI:16595 kegg.compound:C01245

  // Parameters:
  vin = 0.0537145 uM_sec_1;
  kout = 2.397735 sec_1;
  vM3 = 77.44699 sec_1;
  k_CaA = 0.03276856 uM;
  n = 0.5483383 dimensionless;
  k_CaI = 0.02287118 uM;
  m = 0.5538804 dimensionless;
  kip3 = 0.2031899 uM;
  vM2 = 10.17059 uM_sec_1;
  k2 = 0.01375801 uM;
  kf = 0.09062026 sec_1;
  vp = 0.1195475 uM_sec_1;
  kp = 0.505019 uM;
  kdeg = 0.09815504 sec_1;

  // Reactions:
  R1: => X; compartment*vin; R1 is "vin";  // isVersionOf GO:0007204 GO:0006816
  Calcium_export_from_cell: X => ; compartment*kout*X;  // isVersionOf GO:0051481
  CICR: Y => X; ER*4*vM3*k_CaA^n*(X^n/((X^n + k_CaA^n)*(X^n + k_CaI^n)))*(Z^m/(Z^m + kip3^m))*(Y - X);  // modifiers: Z; isVersionOf GO:0048763
  serca: X => Y; compartment*vM2*X^2/(X^2 + k2^2);  // isVersionOf GO:0005388
  Leak_flux: Y => X; ER*kf*(Y - X);  // isVersionOf GO:0022840 GO:0007204
  PLC: => Z; compartment*vp*X^2/(X^2 + kp^2);  // modifiers: X; isVersionOf GO:0004435; isPartOf GO:0032957
  IP3_degradation: Z => ; compartment*kdeg*Z;

  // Unit definitions:
  unit substance = 1e-6 mole; substance is "micro mole";
  unit uM = 1e-6 mole / litre;
  unit uM_sec_1 = 1e-6 mole / (litre * second);
  unit sec_1 = 1 / second;
end
