// SBML level 2 version 1

model untitled()

  // Compartments:
  compartment compartment = 1;

  // Species:
  species X in compartment = 0.7672345;
  species Y in compartment = 1.813591;
  species R in compartment = 0.7743263;
  species YP in compartment = 0.5441024;
  species RP in compartment = 6.56264;
  species $src in compartment = 2.272812e-24;
  species $waste in compartment = 1.151039e-24;

  // Parameters:
  _J1_k21 = 0.1964709;
  _J1_S = 1.317597;
  _J1_k1 = 0.4110251;
  _J1_ko = 1.448196e-14;
  _J2_k2p = 2.276045;
  _J2_k22 = 0.01731608;
  _J3_Km3 = 0.009492831;
  _J3_k3 = 0.05098624;
  _J4_Km4 = 0.004747056;
  _J4_k4 = 0.02492505;
  _J5_Km5 = 0.001945751;
  _J5_k5 = 0.03552669;
  _J6_Km6 = 0.001928567;
  _J6_k6 = 0.04322944;

  // Reactions:
  _J1: $src => X; _J1_ko + _J1_k1*_J1_S - _J1_k21*X;
  _J2: X => $waste; _J2_k22*X + _J2_k2p*RP*X;
  _J3: Y => YP; _J3_k3*X*Y/(_J3_Km3 + Y);
  _J4: YP => Y; _J4_k4*YP/(_J4_Km4 + YP);
  _J5: R => RP; _J5_k5*YP*R/(_J5_Km5 + R);
  _J6: RP => R; _J6_k6*RP/(_J6_Km6 + RP);
end
