// SBML level 2 version 1

model untitled()

  // Compartments:
  compartment compartment = 1;

  // Species:
  species X in compartment = 0.8378803;
  species R in compartment = 0.05027616;
  species E in compartment = 0.3924214;
  species EP in compartment = 0.123922;
  species $src in compartment = 5.979078e-24;
  species $waste in compartment = 4.120839e-5;

  // Parameters:
  _J1_S = 0.03632966;
  _J1_k1 = 1.842291;
  _J2_ko = 0.09247659;
  _J2_kop = 0.003445895;
  _J3_k2 = 0.7785107;
  _J4_Km1 = 0.007645836;
  _J4_k3 = 6.389877;
  _J5_Km2 = 0.08600076;
  _J5_k4 = 0.5863232;

  // Reactions:
  _J1: $src => X; _J1_k1*_J1_S;
  _J2: X => R; X*(_J2_kop + _J2_ko*EP);
  _J3: R => $waste; _J3_k2*R;
  _J4: E => EP; _J4_k3*R*E/(_J4_Km1 + E);
  _J5: EP => E; _J5_k4*EP/(_J5_Km2 + EP);
end
